// COMSOL Multiphysics 6.0.0.312 model "model.mph"
// Outline of the model tree

Parameters
  L = domRight - domLeft
  epsil = .002*0
  a = 0.01
  b = 1.1
  d = 100
  Lmax = L*exp(2500*epsil)
  domLeft = 0  // LHS of Lag. domain
  domRight = 5  // RHS of Lag. domain

Functions
  rn1: Random | type = normal; mean = 1; normalsigma = 1e-1; seed = 113013
  pw1: Piecewise
    pieces = 
      {domLeft, domLeft + L/10, exp((10/(L-domLeft))^2)*exp(-1/(x-(L-domLeft)/10)^2)}
      {domLeft + L/10, domRight, 0}
  an1: Analytic | funcname = S; expr = .01; args = {u, v, t}
  int1: Interpolation "uInit" (disabled) | importedname = UpdatedDomainU.txt; funcs = {uInit, 1}; source = file; filename = /scratch/SharedKrauseWalker/1D/cleanImplementation/temp/UpdatedDomainU.txt; funcname = uInit
  int2: Interpolation "vInit" (disabled) | funcs = {vInit, 1}; source = file; funcname = uInit
  rn2: Random | type = normal; mean = 1; normalsigma = 1e-1; seed = 113014

Probes
  dom1: Domain "Domain Probe 1" (disabled) on all domains
    type = integral
    expr = G
    unit = m
    descr = Dependent variable G
    table = tbl1
  dom2: Domain "Domain Probe 2" (disabled) on all domains | type = integral; expr = u*G; unit = m; table = tbl1
  dom3: Domain "Domain Probe 3" (disabled) on all domains
    type = maximum
    expr = G
    unit = 1
    descr = Dependent variable G
    table = tbl1

Geometry
  geom1 "Geometry 1" (1D, length unit m)
    i1: Interval | coord = {domLeft, domRight}
    fin: Finalize "Form Union"

Physics
  uvPDE: CoefficientFormPDE on all domains
    dependent variable u = {u, v}
    cfeq1: CoefficientFormPDE (default)
      c = {1/G, 0, 0, d/G}
      a = {G*S(u,v,t), 0, 0, G*S(u,v,t)}
      f = {G*(a-u+u^2*v), G*(b-u^2*v)}
      da = {G, 0, 0, G}
    zflx1: ZeroFluxBoundary "Zero Flux 1" (default)
    init1: init "Initial Values 1" (default) | u = (a+b)*abs(rn1(x)); v = (b/(a+b)^2)*abs(rn2(x))
    init2: init "Initial Values 2" (disabled) on all domains | u = uInit(x); v = vInit(x)
  c2: CoefficientFormPDE on all domains
    dependent variable G
    cfeq1: CoefficientFormPDE (default) | c = 0; a = -S(u,v,t); f = 0; da = 1
    zflx1: ZeroFluxBoundary "Zero Flux 1" (default)
    init1: init "Initial Values 1" (default) | G = 1
  eulerianDomain: CoefficientFormPDE on all domains
    dependent variable eulerian
    cfeq1: CoefficientFormPDE (default) | c = 0; f = G; da = 0; al = 0; be = 1
    zflx1: ZeroFluxBoundary "Zero Flux 1" (default)
    init1: init "Initial Values 1" (default) | u2 = x
    dir1: DirichletBoundary "Dirichlet Boundary Condition 1" on boundaries 1 | r = 0

Mesh
  mesh1 "Mesh 1"
    size: MeshSizeDefault | hmax = 1/250; hauto = 1; custom = on
    edg1: Edge on remaining entities

Studies
  std1 "Study 1"
    time: Transient "Time Dependent" | tlist = range(0,5,200); usertol = on; rtol = 1e-4

Solver configurations
  sol1 "Solution 1" (study std1)
    v1: Variables "Dependent Variables 1"
    t1: Time "Time-Dependent Solver 1" | tlist = range(0,5,200); maxstepconstraintbdf = expr; maxstepexpressionbdf = 1e1
      dDef: Direct
      fc1: FullyCoupled | linsolver = dDef

Datasets
  dset1: Solution | solution = sol1
  par1: Parametric1D "Parametric Extrusion 1D 1" | data = dset1; transexpr = G
  dset2: Solution "Probe Solution 2" | solution = sol1
  int1: Integral "Domain Probe 1" on domains 1 | data = dset2
  int2: Integral "Domain Probe 2" on domains 1 | data = dset2
  max1: Maximum "Domain Probe 3" on domains 1 | data = dset2

Derived values
  pev1: EvalPoint "Domain Probe 1" | data = int1; table = tbl1; expr = G
  pev2: EvalPoint "Domain Probe 2" | data = int2; table = tbl1; expr = u*G
  pev3: EvalPoint "Domain Probe 3" | data = max1; table = tbl1; expr = G

Tables
  tbl1: Table "Probe Table 1"
    Time (s) | Dependent variable u (1), Domain Probe 3
    0 | 1.00002
    0.00375306 | 1.00004
    0.00750613 | 1.00005
    0.0150123 | 1.00008
    0.0300245 | 1.00014
    0.0450368 | 1.0002
    0.0750613 | 1.00032
    0.13511 | 1.00056
    0.195159 | 1.0008
    0.315257 | 1.00128
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
Plots
  pg1: PlotGroup1D "1D Plot Group 1" | data = dset1
    lngr1: LineGraph on all domains | expr = u; xdata = expr; xdataexpr = x
  pg3: PlotGroup2D "2D Plot Group 3" (disabled) | data = par1
    surf1: Surface | expr = u
  pg2: PlotGroup2D "2D Plot Group 2" (disabled) | data = par1
    surf1: Surface | expr = G
  pg4: PlotGroup1D "Probe Plot Group 4"
    tblp1: Table "Probe Table Graph 1" | table = tbl1

Exports
  img1: Image
    sourceobject = pg3
    size = manualweb
    unit = px
    width = 640
    height = 480
    pngfilename = /home/krause/Downloads/Figs/Schnackeps0.png
  data1: Data "resultsExport"
    data = dset1
    expr = {u, eulerian}
    filename = /scratch/SharedKrauseWalker/TanhThresh0p1.csv
    location = grid
    regulargridx1 = 40000
    separator = ,
  data2: Data "uExport"
    data = dset1
    expr = {eulerian, u}
    unit = {1, 1}
    descr = {, Dependent variable u}
    filename = /scratch/SharedKrauseWalker/TanhThresh0p1.csv
    location = regulargrid
    regulargridx1 = 40000
    separator = ,
  data3: Data "vExport"
    data = dset1
    expr = {eulerian, v}
    unit = {1, 1}
    descr = {, Dependent variable v}
    filename = /scratch/SharedKrauseWalker/TanhThresh0p1.csv
    location = regulargrid
    regulargridx1 = 40000
    separator = ,
  data4: Data "boundaryExport"
    data = dset1
    expr = eulerian
    unit = 1
    filename = /scratch/SharedKrauseWalker/TanhThresh0p1.csv
    location = grid
    gridx1 = domLeft, domRight
    regulargridx1 = 40000
    separator = ,