// COMSOL Multiphysics 6.0.0.312 model "model.mph"
// Outline of the model tree

Parameters
  L = 4
  epsil = .00025
  D = 100

Functions
  pw1: Piecewise | pieces = {{0, L/10, exp((10/L)^2)*exp(-1/(x-L/10)^2)}, {L/10, L, 0}}
  an1: Analytic | funcname = S; expr = 2*F(u); args = {u, t}
  int1: Interpolation "InterpolatedU" (disabled)
    importedname = UpdatedDomainU.txt
    funcs = {uInit, 1}
    source = file
    filename = /home/krause/Desktop/Conc-Dep-Growth-in-RD-Systems/2D/Simulations/DumbbellScalarRD/temp/UpdatedDomainU.txt
    nargs = 3
    extrapvalue = -1
  an2: Analytic | funcname = F; expr = 0; args = u

Variables
  var1 "Variables 1"
    xx = d(xe,x)
    xy = d(xe,y)
    yx = d(ye,x)
    yy = d(ye,y)
    g11 = xy^2+yy^2
    g21 = -(xx*xy+yx*yy)
    g12 = -(xx*xy+yx*yy)
    g22 = xx^2+yx^2
    vf = abs(xx*yy-xy*yx)  // sqrt(det(g))
    phix = d(p,x)
    phiy = d(p,y)
  var2 "Kinetics"
    fS = a-u+u^2*v  // Schnak
    gS = b-u^2*v  // Schnak
    fG = a+u^2/v-b*u  // GM
    gG = u^2-c*v  // GM
    fTH = a-u-hTH
    hTH = b*u*v/(1+u+c*u^2)  // b=rho, c=K
    gTH = d*(e-v)-hTH  // d=alpha, e=b
    fFHN = e*(u-a*u^3+v-b)
    gFHN = (c-u-d*v)/e
    gGS = a-v*(u^2+a)
    fGS = u^2*v-u*(a+b)

Probes
  dom1: Domain "Domain Probe 1" (disabled) on all domains
    probename = intp
    expr = p
    unit = 1
    descr = Dependent variable p
    table = tbl1
  dom2: Domain "Domain Probe 2" (disabled) on all domains | type = maximum; expr = abs(xe-x*(1+.002*t)); table = tbl1
  dom3: Domain "Domain Probe 3" (disabled) on all domains | type = integral; expr = abs(xe-x*(1+.002*t))^2; table = tbl1
  dom4: Domain "Domain Probe 4" on all domains | type = integral; expr = vf; unit = 1; descr = sqrt(det(g)); table = tbl2

Geometry
  geom2 "Geometry 2" (2D, length unit m)
    ic1: InterpolationCurve "Boundary"
      type = closed
      source = file
      filename = /home/krause/Desktop/Conc-Dep-Growth-in-RD-Systems/2D/Simulations/DumbbellScalarRD_Su0p001/boundaries/initBoundary.txt
      starttang = {1, 0}
      endtang = {1, 0}
    csol1: ConvertToSolid "CreateDomainFromNewBoundary" | input = ic1
    fin: Finalize "Form Union"

Physics
  uvPDE: CoefficientFormPDE "PDE for u" on all domains
    dependent variable u
    cfeq1: CoefficientFormPDE (default) | c = {g11/vf, g12/vf, g12/vf, g22/vf}; a = vf*S(u,t); f = vf*(u-u^3); da = vf
    zflx1: ZeroFluxBoundary "Zero Flux 1" (default)
    init1: init "Initial Values 1" (default) | u = x; u2 = a+b+rn1(x,y); u3 = b/(a+b)^2+rn2(x,y); v = rn2(x,y)
    init2: init "Initial Values From Previous Sim" (disabled) on all domains
      u = uInit(x,y)
      u2 = a+b+rn1(x,y)
      u3 = b/(a+b)^2+rn2(x,y)
      v = vInit(x,y)
  phiPDE: CoefficientFormPDE "PDE for Phi" on all domains
    dependent variable p
    ShapeProperty.shapeFunctionType = shlag
    ShapeProperty.order = 2
    cfeq1: CoefficientFormPDE (default) | c = {g11/vf, g12/vf, g12/vf, g22/vf}; f = -vf*S(u,t); da = 0
    zflx1: ZeroFluxBoundary "Zero Flux 1" (default)
    init1: init "Initial Values 1" (default) | p = (x^2+y^2-L^2)/(4*epsil)
    dir1: DirichletBoundary "Dirichlet Boundary Condition 1" on all boundaries | r = 0
  dode: DomainODE "Domain ODEs and DAEs" on all domains
    dependent variable u4 = {xe, ye}
    ShapeProperty.shapeFunctionType = shlag
    ShapeProperty.order = 2
    dode1: DistributedODE (default)
      f = {(phix*(g11*xx+g12*xy)+phiy*(g21*xx+g22*xy))/vf^2, (phix*(g11*yx+g12*yy)+phiy*(g21*yx+g22*yy))/vf^2}
      da = {1, 0, 0, 1}
    init1: init "Initial Values 1" (default) | xe = x; ye = y

Mesh
  mesh2 "Mesh 2"
    size: MeshSizeDefault | hmax = 0.035; hmin = 1.0E-5; hnarrow = 3; hgrad = 1.2; hauto = 1; custom = on
    ftri1: FreeTri "Free Triangular 1" on remaining entities | smoothmaxiter = 4; smoothmaxdepth = 4

Studies
  std1 "Study 1"
    time: Transient "Time Dependent" | tlist = range(0,50,1000); usertol = on; rtol = 1e-4

Solver configurations
  sol1 "Solution 1" (study std1)
    v1: Variables "Dependent Variables 1"
    t1: Time "Time-Dependent Solver 1"
      tlist = range(0,50,1000)
      initialstepbdf = 1e-8
      maxstepconstraintbdf = const
      maxstepbdf = 1
      dDef: Direct
      fc1: FullyCoupled | linsolver = dDef

Datasets
  dset7: Solution | solution = none
  dset8: Solution "Probe Solution 8" | solution = sol1
  int1: Integral "Domain Probe 4" on domains 1 | data = dset8
  dset9: Solution | solution = sol1

Derived values
  pev1: EvalPoint "Domain Probe 4" | data = int1; table = tbl2; expr = vf
  int1: IntSurface "Surface Integration 1" on domains 1
    data = dset7
    table = tbl4
    expr = vf
    unit = 1
    descr = sqrt(det(g))

Tables
  tbl1: Table "Probe Table 1"
    Time (s)
    0
    10
    20
    30
    40
    50
    60
    70
    80
    90
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  tbl3: Table
    // Surface Integration 1
    Time (s)
    0
    10
    20
    30
    40
    50
    60
    70
    80
    90
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  tbl4: Table
    // Surface Integration 1
    Time (s)
    0
    10
    20
    30
    40
    50
    60
    70
    80
    90
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
Plots
  pg1: PlotGroup1D "Probe Plot Group 1"
    tblp1: Table "Probe Table Graph 1" | table = tbl2
  pg2: PlotGroup2D "2D Plot Group 2" | data = dset9
    surf1: Surface | expr = u

Exports
  data1: Data "ExportPlottingData"
    data = dset9
    expr = {u, , , xe, ye}
    filename = /scratch/SharedKrauseWalker/ActualConcentrationDepLargerRemeshed3000_5000.csv
    location = grid
    gridx2 = range(-25,50/200,25)
    gridy2 = range(-25,50/200,25)
    regulargridx2 = 200
    regulargridy2 = 200
  data2: Data "ExportBoundary"
    data = dset9
    expr = {xe, ye}
    unit = {1, 1}
    filename = /scratch/SharedKrauseWalker/2D/AndrewsPlayground/UpdatedBoundary.txt
    location = file
    coordfilename = /scratch/SharedKrauseWalker/2D/AndrewsPlayground/UpdatedBoundaryTrimmed.txt
    separator = ,
  data3: Data "ExportDomainU"
    data = dset9
    expr = {xe, ye, u}
    unit = {1, 1, 1}
    filename = /scratch/SharedKrauseWalker/2D/AndrewsPlayground/UpdatedDomainU.txt
    separator = ,
  data4: Data "ExportDomainV"
    data = dset9
    expr = {xe, ye, v}
    unit = {1, 1, }
    filename = /scratch/SharedKrauseWalker/2D/AndrewsPlayground/UpdatedDomainV.txt
    separator = ,
  data5: Data "ExportVolumeForm"
    data = dset9
    expr = {, , }
    filename = /scratch/SharedKrauseWalker/ActualConcentrationDepLargerRemeshed3000_5000.csv
    location = grid
    gridx2 = range(-25,50/200,25)
    gridy2 = range(-25,50/200,25)
    regulargridx2 = 200
    regulargridy2 = 200