// COMSOL Multiphysics 6.0.0.312 model "model.mph"
// Outline of the model tree

Parameters
  L = 2
  epsil = .00025
  D = 1000
  a = .01
  b = .5
  ussS = a+b
  vssS = b/(a+b)^2
  c = 5.5
  ussGM = (a+c)/b
  vssGM = ussGM^2/c
  uss = ussGM
  vss = vssGM

Functions
  pw1: Piecewise | pieces = {{0, L/10, exp((10/L)^2)*exp(-1/(x-L/10)^2)}, {L/10, L, 0}}
  an1: Analytic | funcname = S; expr = 2*F(u,v); args = {u, v, t}
  int1: Interpolation "InterpolatedU" | importedname = UpdatedDomainU.txt; funcs = {uInit, 1}; source = file; filename = /home/krause/Desktop/Conc-Dep-Growth-in-RD-Systems/2D/Simulations/GmGrowthContraction/temp/UpdatedDomainU.txt; nargs = 2; extrapvalue = -1
  an2: Analytic | funcname = F; expr = 0; args = {u, v}
  rn1: Random | nargs = 2; type = normal; mean = uss; normalsigma = 1e-1; seed = 113013
  rn2: Random | nargs = 2; type = normal; mean = vss; normalsigma = 1e-1; seed = 113014
  int2: Interpolation "InterpolatedV"
    importedname = UpdatedDomainV.txt
    funcs = {vInit, 1}
    source = file
    filename = /home/krause/Desktop/Conc-Dep-Growth-in-RD-Systems/2D/Simulations/GmGrowthContraction/temp/UpdatedDomainV.txt
    nargs = 2
    funcname = int1
    interp = neighbor
    extrapvalue = -1

Variables
  var1 "Variables 1"
    xx = d(xe,x)
    xy = d(xe,y)
    yx = d(ye,x)
    yy = d(ye,y)
    g11 = xy^2+yy^2
    g21 = -(xx*xy+yx*yy)
    g12 = -(xx*xy+yx*yy)
    g22 = xx^2+yx^2
    vf = abs(xx*yy-xy*yx)  // sqrt(det(g))
    phix = d(p,x)
    phiy = d(p,y)
  var2 "Kinetics"
    fS = a-u+u^2*v  // Schnak
    gS = b-u^2*v  // Schnak
    fG = a+u^2/v-b*u  // GM
    gG = u^2-c*v  // GM
    fTH = a-u-hTH
    hTH = b*u*v/(1+u+c*u^2)  // b=rho, c=K
    gTH = d*(e-v)-hTH  // d=alpha, e=b
    fFHN = e*(u-a*u^3+v-b)
    gFHN = (c-u-d*v)/e
    gGS = a-v*(u^2+a)
    fGS = u^2*v-u*(a+b)

Probes
  dom1: Domain "Domain Probe 1" (disabled) on all domains
    probename = intp
    expr = p
    unit = 1
    descr = Dependent variable p
    table = tbl1
  dom2: Domain "Domain Probe 2" (disabled) on all domains | type = maximum; expr = abs(xe-x*(1+.002*t)); table = tbl1
  dom3: Domain "Domain Probe 3" (disabled) on all domains | type = integral; expr = abs(xe-x*(1+.002*t))^2; table = tbl1
  dom4: Domain "Domain Probe 4" on all domains | type = integral; expr = vf; unit = 1; descr = sqrt(det(g)); table = tbl2

Geometry
  geom2 "Geometry 2" (2D, length unit m)
    ic1: InterpolationCurve "Boundary"
      type = closed
      source = file
      filename = /home/krause/Desktop/Conc-Dep-Growth-in-RD-Systems/2D/Simulations/NEW/boundaries/initBoundary.txt
      rtol = 0.001
      starttang = {1, 0}
      endtang = {1, 0}
    csol1: ConvertToSolid "CreateDomainFromNewBoundary" | input = ic1
    fin: Finalize "Form Union"

Physics
  uvPDE: CoefficientFormPDE "PDE for u" on all domains
    dependent variable u2 = {u, v}
    cfeq1: CoefficientFormPDE (default)
      c = 
        {g11/vf, g12/vf, g12/vf, g22/vf}
        {0, 0, 0, 0}
        {0, 0, 0, 0}
        {D*g11/vf, D*g12/vf, D*g12/vf, D*g22/vf}
      a = {vf*S(u,v,t), 0, 0, vf*S(u,v,t)}
      f = {vf*(fG), vf*(gG)}
      da = {vf, 0, 0, vf}
    zflx1: ZeroFluxBoundary "Zero Flux 1" (default)
    init1: init "Initial Values 1" (default)
      u = abs(rn1(x,y))
      v = abs(rn2(x,y))
      u2 = a+b+rn1(x,y)
      u3 = b/(a+b)^2+rn2(x,y)
    init2: init "Initial Values From Previous Sim" (disabled) on all domains
      u = uInit(x,y)
      v = vInit(x,y)
      u2 = a+b+rn1(x,y)
      u3 = b/(a+b)^2+rn2(x,y)
  phiPDE: CoefficientFormPDE "PDE for Phi" on all domains
    dependent variable p
    ShapeProperty.shapeFunctionType = shlag
    ShapeProperty.order = 2
    cfeq1: CoefficientFormPDE (default) | c = {g11/vf, g12/vf, g12/vf, g22/vf}; f = -vf*S(u,v,t); da = 0
    zflx1: ZeroFluxBoundary "Zero Flux 1" (default)
    init1: init "Initial Values 1" (default) | p = (x^2+y^2-L^2)/(4*epsil)
    dir1: DirichletBoundary "Dirichlet Boundary Condition 1" on all boundaries | r = 0
  dode: DomainODE "Domain ODEs and DAEs" on all domains
    dependent variable u4 = {xe, ye}
    ShapeProperty.shapeFunctionType = shlag
    ShapeProperty.order = 2
    dode1: DistributedODE (default)
      f = {(phix*(g11*xx+g12*xy)+phiy*(g21*xx+g22*xy))/vf^2, (phix*(g11*yx+g12*yy)+phiy*(g21*yx+g22*yy))/vf^2}
      da = {1, 0, 0, 1}
    init1: init "Initial Values 1" (default) | xe = x; ye = y

Mesh
  mesh2 "Mesh 2"
    size: MeshSizeDefault | hmax = 0.2; hmin = 7.5E-4; hgrad = 1.25; hauto = 3; custom = on
    ftri1: FreeTri "Free Triangular 1" on remaining entities | smoothmaxiter = 4; smoothmaxdepth = 4

Studies
  std1 "Study 1"
    time: Transient "Time Dependent" | tlist = range(0,5,200); usertol = on; rtol = 1e-4

Solver configurations
  sol1 "Solution 1" (study std1)
    v1: Variables "Dependent Variables 1"
    t1: Time "Time-Dependent Solver 1"
      tlist = range(0,5,200)
      initialstepbdf = 1e-8
      maxstepconstraintbdf = const
      maxstepbdf = 1
      dDef: Direct
      fc1: FullyCoupled | linsolver = dDef

Datasets
  dset7: Solution | solution = none
  dset8: Solution "Probe Solution 8" | solution = sol1
  int1: Integral "Domain Probe 4" on domains 1 | data = dset8
  dset9: Solution | solution = none
  dset10: Solution | solution = sol1
  int2_ds1: Grid2D

Derived values
  pev1: EvalPoint "Domain Probe 4" | data = int1; table = tbl2; expr = vf
  int1: IntSurface "Surface Integration 1" | data = dset7; table = tbl4; expr = vf; unit = 1; descr = sqrt(det(g))

Tables
  tbl1: Table "Probe Table 1"
    Time (s)
    0
    10
    20
    30
    40
    50
    60
    70
    80
    90
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  tbl2: Table | filename = /scratch/SharedKrauseWalker/2D/AndrewsPlayground/vfs/vfs.csv
    Time (s) | sqrt(det(g)) (1), Domain Probe 4
    0 | 28.2743
    5 | 28.2743
    10 | 28.2743
    15 | 28.2743
    20 | 28.2743
    25 | 28.2743
    30 | 28.2743
    35 | 28.2743
    40 | 28.2743
    45 | 28.2743
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  tbl3: Table
    // Surface Integration 1
    Time (s)
    0
    10
    20
    30
    40
    50
    60
    70
    80
    90
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  tbl4: Table
    // Surface Integration 1
    Time (s)
    0
    10
    20
    30
    40
    50
    60
    70
    80
    90
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
Plots
  pg1: PlotGroup1D "Probe Plot Group 1"
    tblp1: Table "Probe Table Graph 1" | table = tbl2
  pg2: PlotGroup2D "2D Plot Group 2" | data = dset10
    surf1: Surface | expr = u
  pg3: PlotGroup2D "2D Plot Group 3" | data = dset10
    surf1: Surface | expr = v
  pg4: PlotGroup2D "2D Plot Group 4" | data = dset10
    surf1: Surface | expr = p
  pg5: PlotGroup2D "2D Plot Group 5" | data = dset10
    surf1: Surface | expr = xe

Exports
  data1: Data "ExportPlottingData"
    data = dset10
    expr = {u, , , xe, ye}
    filename = /scratch/SharedKrauseWalker/ActualConcentrationDepLargerRemeshed3000_5000.csv
    location = grid
    gridx2 = range(-25,50/200,25)
    gridy2 = range(-25,50/200,25)
    regulargridx2 = 200
    regulargridy2 = 200
  data2: Data "ExportBoundary"
    data = dset10
    expr = {xe, ye}
    unit = {1, 1}
    filename = /scratch/SharedKrauseWalker/2D/AndrewsPlayground/UpdatedBoundary.txt
    location = file
    coordfilename = /scratch/SharedKrauseWalker/2D/AndrewsPlayground/UpdatedBoundaryTrimmed.txt
    separator = ,
  data3: Data "ExportDomainU"
    data = dset10
    expr = {xe, ye, u}
    unit = {1, 1, 1}
    filename = /home/krause/Desktop/Conc-Dep-Growth-in-RD-Systems/2D/Simulations/uMinusv/temp/UpdatedDomainU.txt
    separator = ,
  data4: Data "ExportDomainV"
    data = dset10
    expr = {xe, ye, v}
    unit = {1, 1, 1}
    filename = /home/krause/Desktop/Conc-Dep-Growth-in-RD-Systems/2D/Simulations/uMinusv/temp/UpdatedDomainV.txt
    separator = ,
  data5: Data "ExportVolumeForm"
    data = dset9
    expr = {, , }
    filename = /scratch/SharedKrauseWalker/ActualConcentrationDepLargerRemeshed3000_5000.csv
    location = grid
    gridx2 = range(-25,50/200,25)
    gridy2 = range(-25,50/200,25)
    regulargridx2 = 200
    regulargridy2 = 200